// SBML level 3 version 2

model RAF_asymmetric_RAFi()

  // Compartments:
  compartment default = 1;

  // Species:
  substanceOnly species __s0 in default = R_0; __s0 is "R(r=None, i=None, state='none')";
  substanceOnly species __s1 in default = I1_0; __s1 is "I1(r=None)";
  substanceOnly species __s2 in default = I2_0; __s2 is "I2(r=None)";
  substanceOnly species __s3 in default = 0; __s3 is "R(r=1, i=None, state='R1') ._br_R(r=1, i=None, state='R2')";
  substanceOnly species __s4 in default = 0; __s4 is "I1(r=1) ._br_R(r=None, i=1, state='none')";
  substanceOnly species __s5 in default = 0; __s5 is "I2(r=1) ._br_R(r=None, i=1, state='none')";
  substanceOnly species __s6 in default = 0; __s6 is "I1(r=1) ._br_R(r=2, i=1, state='R2') ._br_R(r=2, i=None, state='R1')";
  substanceOnly species __s7 in default = 0; __s7 is "I2(r=1) ._br_R(r=2, i=1, state='R2') ._br_R(r=2, i=None, state='R1')";
  substanceOnly species __s8 in default = 0; __s8 is "I1(r=1) ._br_R(r=2, i=1, state='R1') ._br_R(r=2, i=None, state='R2')";
  substanceOnly species __s9 in default = 0; __s9 is "I1(r=1) ._br_I1(r=2) ._br_R(r=3, i=1, state='R1') ._br_R(r=3, i=2, state='R2')";
  substanceOnly species __s10 in default = 0; __s10 is "I1(r=1) ._br_I2(r=2) ._br_R(r=3, i=1, state='R1') ._br_R(r=3, i=2, state='R2')";
  substanceOnly species __s11 in default = 0; __s11 is "I2(r=1) ._br_R(r=2, i=1, state='R1') ._br_R(r=2, i=None, state='R2')";
  substanceOnly species __s12 in default = 0; __s12 is "I1(r=1) ._br_I2(r=2) ._br_R(r=3, i=2, state='R1') ._br_R(r=3, i=1, state='R2')";
  substanceOnly species __s13 in default = 0; __s13 is "I2(r=1) ._br_I2(r=2) ._br_R(r=3, i=1, state='R1') ._br_R(r=3, i=2, state='R2')";

  // Parameters:
  R_0 = 0.01;
  I1_0 = 0;
  I2_0 = 0;
  kr_1 = 10;
  kf_1 = 1;
  phi_1 = 1;
  kr_2a = 0.1;
  kf_2a = 1;
  phi_2a = 1;
  kr_2b = 0.1;
  kf_2b = 1;
  phi_2b = 1;
  f_a = 1;
  f_b = 1;
  g_1a = 1;
  g_1b = 1;
  g_2a = 1;
  g_2b = 1;
  g_3a = 1;
  g_3b = 1;
  kcat = 1;
  plambda = 10;
  p1 = 0.5;
  p2 = 0.5;
  var __obs0; __obs0 is "R_obs";
  var __obs1; __obs1 is "RR_obs";
  var __obs2; __obs2 is "R1R2I_obs";
  var __obs3; __obs3 is "R2R1I_obs";
  var __obs4; __obs4 is "IRRI_obs";

  // Assignment rules:
  Kd_1 := kr_1/kf_1;
  Gf_1 := ln(kr_1/kf_1);
  Ea0_1 := -(phi_1*ln(kr_1/kf_1)) - ln(kf_1);
  Kd_2a := kr_2a/kf_2a;
  Gf_2a := ln(kr_2a/kf_2a);
  Ea0_2a := -(phi_2a*ln(kr_2a/kf_2a)) - ln(kf_2a);
  Kd_2b := kr_2b/kf_2b;
  Gf_2b := ln(kr_2b/kf_2b);
  Ea0_2b := -(phi_2b*ln(kr_2b/kf_2b)) - ln(kf_2b);
  Gf_fa := ln(f_a);
  Gf_fb := ln(f_b);
  Gf_g1a := ln(g_1a);
  Gf_g1b := ln(g_1b);
  Gf_g2a := ln(g_2a);
  Gf_g2b := ln(g_2b);
  Gf_g3a := ln(g_3a);
  Gf_g3b := ln(g_3b);
  Gf_g1a_fa := ln(f_a) + ln(g_1a);
  Gf_g1b_fb := ln(f_b) + ln(g_1b);
  Gf_g2a_g1a_fa := ln(f_a) + ln(g_1a) + ln(g_2a);
  Gf_g2b_g1b_fb := ln(f_b) + ln(g_1b) + ln(g_2b);
  Gf_g3a_g1b_fb := ln(f_b) + ln(g_1b) + ln(g_3a);
  Gf_g3b_g1a_fa := ln(f_a) + ln(g_1a) + ln(g_3b);
  R_active := kcat*(plambda*(p1*(__s11 + __s8) + p2*(__s6 + __s7) + __s3) + __s0);
  _R1_local1 := kf_1;
  _R2a_local1 := kf_2a;
  _R2b_local1 := kf_2b;
  _R1_local2 := kf_1*exp(-(phi_1*(ln(f_a) + ln(g_1a) + ln(kr_1/kf_1))) + phi_1*ln(kr_1/kf_1));
  _R1_local3 := kf_1*exp(-(phi_1*(ln(f_b) + ln(g_1b) + ln(kr_1/kf_1))) + phi_1*ln(kr_1/kf_1));
  _R1_local4 := kf_1*exp(-(phi_1*(ln(f_a) + ln(kr_1/kf_1))) + phi_1*ln(kr_1/kf_1));
  _R1_local5 := kf_1*exp(-(phi_1*(ln(f_a) + ln(g_1a) + ln(g_2a) + ln(kr_1/kf_1))) + phi_1*ln(kr_1/kf_1));
  _R1_local6 := kf_1*exp(-(phi_1*(ln(f_b) + ln(g_1b) + ln(g_3a) + ln(kr_1/kf_1))) + phi_1*ln(kr_1/kf_1));
  _R1_local7 := kf_1*exp(-(phi_1*(ln(f_b) + ln(kr_1/kf_1))) + phi_1*ln(kr_1/kf_1));
  _R1_local8 := kf_1*exp(-(phi_1*(ln(f_a) + ln(g_1a) + ln(g_3b) + ln(kr_1/kf_1))) + phi_1*ln(kr_1/kf_1));
  _R1_local9 := kf_1*exp(-(phi_1*(ln(f_b) + ln(g_1b) + ln(g_2b) + ln(kr_1/kf_1))) + phi_1*ln(kr_1/kf_1));
  __reverse_R1_local1 := kf_1*exp(phi_1*ln(kr_1/kf_1) + (1 - phi_1)*ln(kr_1/kf_1));
  _R2a_local2 := kf_2a*exp(-(phi_2a*(ln(f_a) + ln(kr_2a/kf_2a))) + phi_2a*ln(kr_2a/kf_2a));
  _R2a_local3 := kf_2a*exp(-(phi_2a*(ln(f_a) + ln(g_1a) + ln(kr_2a/kf_2a))) + phi_2a*ln(kr_2a/kf_2a));
  __reverse_R2a_local1 := kf_2a*exp(phi_2a*ln(kr_2a/kf_2a) + (1 - phi_2a)*ln(kr_2a/kf_2a));
  _R2b_local2 := kf_2b*exp(-(phi_2b*(ln(f_b) + ln(kr_2b/kf_2b))) + phi_2b*ln(kr_2b/kf_2b));
  _R2b_local3 := kf_2b*exp(-(phi_2b*(ln(f_b) + ln(g_1b) + ln(kr_2b/kf_2b))) + phi_2b*ln(kr_2b/kf_2b));
  __reverse_R2b_local1 := kf_2b*exp(phi_2b*ln(kr_2b/kf_2b) + (1 - phi_2b)*ln(kr_2b/kf_2b));
  __reverse_R1_local2 := kf_1*exp(phi_1*ln(kr_1/kf_1) - (1 - phi_1)*(-ln(f_a) - ln(g_1a) - ln(kr_1/kf_1)));
  __reverse_R1_local3 := kf_1*exp(phi_1*ln(kr_1/kf_1) - (1 - phi_1)*(-ln(f_b) - ln(g_1b) - ln(kr_1/kf_1)));
  __reverse_R1_local4 := kf_1*exp(phi_1*ln(kr_1/kf_1) - (1 - phi_1)*(-ln(f_a) - ln(kr_1/kf_1)));
  __reverse_R1_local5 := kf_1*exp(phi_1*ln(kr_1/kf_1) - (1 - phi_1)*(-ln(f_a) - ln(g_1a) - ln(g_2a) - ln(kr_1/kf_1)));
  __reverse_R1_local6 := kf_1*exp(phi_1*ln(kr_1/kf_1) - (1 - phi_1)*(-ln(f_b) - ln(g_1b) - ln(g_3a) - ln(kr_1/kf_1)));
  __reverse_R1_local7 := kf_1*exp(phi_1*ln(kr_1/kf_1) - (1 - phi_1)*(-ln(f_b) - ln(kr_1/kf_1)));
  __reverse_R1_local8 := kf_1*exp(phi_1*ln(kr_1/kf_1) - (1 - phi_1)*(-ln(f_a) - ln(g_1a) - ln(g_3b) - ln(kr_1/kf_1)));
  __reverse_R1_local9 := kf_1*exp(phi_1*ln(kr_1/kf_1) - (1 - phi_1)*(-ln(f_b) - ln(g_1b) - ln(g_2b) - ln(kr_1/kf_1)));
  _R2a_local4 := kf_2a*exp(-(phi_2a*(ln(g_2a) + ln(kr_2a/kf_2a))) + phi_2a*ln(kr_2a/kf_2a));
  _R2a_local5 := kf_2a*exp(-(phi_2a*(ln(g_3a) + ln(kr_2a/kf_2a))) + phi_2a*ln(kr_2a/kf_2a));
  _R2a_local6 := kf_2a*exp(-(phi_2a*(ln(g_1a) + ln(g_2a) + ln(kr_2a/kf_2a))) + phi_2a*ln(kr_2a/kf_2a));
  _R2a_local7 := kf_2a*exp(-(phi_2a*(ln(f_a) - ln(f_b) + ln(g_1a) + ln(g_3b) + ln(kr_2a/kf_2a))) + phi_2a*ln(kr_2a/kf_2a));
  __reverse_R2a_local2 := kf_2a*exp(phi_2a*ln(kr_2a/kf_2a) - (1 - phi_2a)*(-ln(f_a) - ln(g_1a) - ln(kr_2a/kf_2a)));
  __reverse_R2a_local3 := kf_2a*exp(phi_2a*ln(kr_2a/kf_2a) - (1 - phi_2a)*(-ln(f_a) - ln(kr_2a/kf_2a)));
  __reverse_R2a_local4 := kf_2a*exp(phi_2a*ln(kr_2a/kf_2a) - (1 - phi_2a)*(-ln(g_2a) - ln(kr_2a/kf_2a)));
  __reverse_R2a_local5 := kf_2a*exp(phi_2a*ln(kr_2a/kf_2a) - (1 - phi_2a)*(-ln(g_1a) - ln(g_2a) - ln(kr_2a/kf_2a)));
  __reverse_R2a_local6 := kf_2a*exp(phi_2a*ln(kr_2a/kf_2a) - (1 - phi_2a)*(-ln(g_3a) - ln(kr_2a/kf_2a)));
  __reverse_R2a_local7 := kf_2a*exp(phi_2a*ln(kr_2a/kf_2a) - (1 - phi_2a)*(-ln(f_a) + (ln(f_b) - ln(g_1a) - ln(g_3b) - ln(kr_2a/kf_2a))));
  _R2b_local4 := kf_2b*exp(-(phi_2b*(ln(g_3b) + ln(kr_2b/kf_2b))) + phi_2b*ln(kr_2b/kf_2b));
  _R2b_local5 := kf_2b*exp(-(phi_2b*(ln(g_2b) + ln(kr_2b/kf_2b))) + phi_2b*ln(kr_2b/kf_2b));
  _R2b_local6 := kf_2b*exp(-(phi_2b*(-ln(f_a) + ln(f_b) + ln(g_1b) + ln(g_3a) + ln(kr_2b/kf_2b))) + phi_2b*ln(kr_2b/kf_2b));
  _R2b_local7 := kf_2b*exp(-(phi_2b*(ln(g_1b) + ln(g_2b) + ln(kr_2b/kf_2b))) + phi_2b*ln(kr_2b/kf_2b));
  __reverse_R2b_local2 := kf_2b*exp(phi_2b*ln(kr_2b/kf_2b) - (1 - phi_2b)*(-ln(f_b) - ln(g_1b) - ln(kr_2b/kf_2b)));
  __reverse_R2b_local3 := kf_2b*exp(phi_2b*ln(kr_2b/kf_2b) - (1 - phi_2b)*(ln(f_a) - ln(f_b) - ln(g_1b) - ln(g_3a) - ln(kr_2b/kf_2b)));
  __reverse_R2b_local4 := kf_2b*exp(phi_2b*ln(kr_2b/kf_2b) - (1 - phi_2b)*(-ln(f_b) - ln(kr_2b/kf_2b)));
  __reverse_R2b_local5 := kf_2b*exp(phi_2b*ln(kr_2b/kf_2b) - (1 - phi_2b)*(-ln(g_3b) - ln(kr_2b/kf_2b)));
  __reverse_R2b_local6 := kf_2b*exp(phi_2b*ln(kr_2b/kf_2b) - (1 - phi_2b)*(-ln(g_2b) - ln(kr_2b/kf_2b)));
  __reverse_R2b_local7 := kf_2b*exp(phi_2b*ln(kr_2b/kf_2b) - (1 - phi_2b)*(-ln(g_1b) - ln(g_2b) - ln(kr_2b/kf_2b)));
  __obs0 := __s0;
  __obs1 := __s3;
  __obs2 := __s11 + __s8;
  __obs3 := __s6 + __s7;
  __obs4 := __s10 + __s12 + __s13 + __s9;

  // Reactions:
  r0: __s0 + __s0 -> __s3; _R1_local1*__s0^2 - __reverse_R1_local1*__s3; r0 is "R1";
  r1: __s0 + __s1 -> __s4; _R2a_local1*__s0*__s1 - __reverse_R2a_local1*__s4; r1 is "R2a";
  r2: __s0 + __s2 -> __s5; _R2b_local1*__s0*__s2 - __reverse_R2b_local1*__s5; r2 is "R2b";
  r3: __s0 + __s4 -> __s6; _R1_local2*__s0*__s4 - __reverse_R1_local2*__s6; r3 is "R1";
  r4: __s0 + __s5 -> __s7; _R1_local3*__s0*__s5 - __reverse_R1_local3*__s7; r4 is "R1";
  r5: __s0 + __s4 -> __s8; _R1_local4*__s0*__s4 - __reverse_R1_local4*__s8; r5 is "R1";
  r6: __s4 + __s4 -> __s9; _R1_local5*__s4^2 - __reverse_R1_local5*__s9; r6 is "R1";
  r7: __s4 + __s5 -> __s10; _R1_local6*__s4*__s5 - __reverse_R1_local6*__s10; r7 is "R1";
  r8: __s0 + __s5 -> __s11; _R1_local7*__s0*__s5 - __reverse_R1_local7*__s11; r8 is "R1";
  r9: __s4 + __s5 -> __s12; _R1_local8*__s4*__s5 - __reverse_R1_local8*__s12; r9 is "R1";
  r10: __s5 + __s5 -> __s13; _R1_local9*__s5^2 - __reverse_R1_local9*__s13; r10 is "R1";
  r11: __s1 + __s3 -> __s8; _R2a_local2*__s1*__s3 - __reverse_R2a_local3*__s8; r11 is "R2a";
  r12: __s1 + __s3 -> __s6; _R2a_local3*__s1*__s3 - __reverse_R2a_local2*__s6; r12 is "R2a";
  r13: __s2 + __s3 -> __s11; _R2b_local2*__s2*__s3 - __reverse_R2b_local4*__s11; r13 is "R2b";
  r14: __s2 + __s3 -> __s7; _R2b_local3*__s2*__s3 - __reverse_R2b_local2*__s7; r14 is "R2b";
  r15: __s1 + __s6 -> __s9; _R2a_local4*__s1*__s6 - __reverse_R2a_local4*__s9; r15 is "R2a";
  r16: __s1 + __s7 -> __s10; _R2a_local5*__s1*__s7 - __reverse_R2a_local6*__s10; r16 is "R2a";
  r17: __s1 + __s8 -> __s9; _R2a_local6*__s1*__s8 - __reverse_R2a_local5*__s9; r17 is "R2a";
  r18: __s1 + __s11 -> __s12; _R2a_local7*__s1*__s11 - __reverse_R2a_local7*__s12; r18 is "R2a";
  r19: __s2 + __s6 -> __s12; _R2b_local4*__s2*__s6 - __reverse_R2b_local5*__s12; r19 is "R2b";
  r20: __s2 + __s7 -> __s13; _R2b_local5*__s2*__s7 - __reverse_R2b_local6*__s13; r20 is "R2b";
  r21: __s2 + __s8 -> __s10; _R2b_local6*__s2*__s8 - __reverse_R2b_local3*__s10; r21 is "R2b";
  r22: __s2 + __s11 -> __s13; _R2b_local7*__s11*__s2 - __reverse_R2b_local7*__s13; r22 is "R2b";
end
